// COMSOL Multiphysics 5.3.1.201 model "triangle_compare_div.mph"
// Outline of the model tree

Parameters
  R_p = 20 [nm]  // radius of pore
  t_gr = 0.67[nm]  // thickness of graphene
  L = 20 * R_p  // length of simulation box
  H = 20 * R_p  // half height of simulation box
  z_p = 1  // positive
  z_n = -1  // negative
  V_gate = 0.25 [V]
  V_bot = -V_gate  // actual potential bottom
  D_K = 1.90e-9 [m^2/s]
  D_Cl = 1.98e-9 [m^2/s]
  D_Li = 0.53 * D_K
  D_Na = 0.68 * D_K
  D_Ca = 0.81 * D_K
  D_Mg = 0.72 * D_K
  c_top = 1e-3 [mol/L]
  c_bottom = 0.1 * c_top
  t_helm = 0.3e-9[m]
  eps_water = 78
  eps_helm = 20
  N_div = 5
  N_bound = 100

Geometry
  geom1 "Geometry 1" (2D axisymmetric, length unit m)
    r1: Rectangle | size = {L, H}
    r2: Rectangle | pos = {0, -H}; size = {L, H}
    r3: Rectangle | pos = {R_p, -t_gr/2}; size = {L - R_p, t_gr}
    c1: Circle | pos = {R_p, 0}; r = t_gr/2
    uni1: Union "graphene" | input = c1, r3; intbnd = off; edge = all
    r4: Rectangle | pos = {R_p, -(t_gr + 2*t_helm)/2}; size = {L - R_p, t_gr+2*t_helm}
    c2: Circle | pos = {R_p, 0}; r = t_gr/2 + t_helm
    uni2: Union "outer helmholtz" | input = c2, r4; intbnd = off; edge = all
    dif1: Difference "top" | input = r1; input2 = uni2; keep = on; intbnd = off; edge = all
    dif2: Difference "bottom" | input = r2; input2 = uni2; keep = on; intbnd = off; edge = all
    dif3: Difference | input = uni2; input2 = uni1; keep = on
    ls1: LineSegment | specify1 = coord; coord1 = {R_p, 0}; specify2 = coord; coord2 = {L, 0}
    fin: Finalize "Form Union"
    igv1: IgnoreVertices | input = fin(1) points 4-6, 10
    ige1: IgnoreEdges | input = igv1(1) boundaries 6, 7
    ige2: IgnoreEdges (disabled) | input = ige1(1) boundaries 4

Materials
  mat1: Common "Water" on domains 1-4
    def "Basic"
      dynamicviscosity = eta(T[1/K])[Pa*s]
      ratioofspecificheat = 1.0
      electricconductivity = 5.5e-6[S/m]
      heatcapacity = Cp(T[1/K])[J/(kg*K)]
      density = rho(T[1/K])[kg/m^3]
      thermalconductivity = k(T[1/K])[W/(m*K)]
      soundspeed = cs(T[1/K])[m/s]
      relpermittivity = 78
      eta: Piecewise
        arg = T
        pieces = 
          {273.15, 413.15, 1.3799566804-0.021224019151*T^1+1.3604562827E-4*T^2-4.6454090319E-7*T^3+8.9042735735E-10*T^4-9.0790692686E-13*T^5+3.8457331488E-16*T^6}
          {413.15, 553.75, 0.00401235783-2.10746715E-5*T^1+3.85772275E-8*T^2-2.39730284E-11*T^3}
      Cp: Piecewise | arg = T; pieces = {273.15, 553.75, 12010.1471-80.4072879*T^1+0.309866854*T^2-5.38186884E-4*T^3+3.62536437E-7*T^4}
      rho: Piecewise | arg = T; pieces = {273.15, 553.75, 838.466135+1.40050603*T^1-0.0030112376*T^2+3.71822313E-7*T^3}
      k: Piecewise | arg = T; pieces = {273.15, 553.75, -0.869083936+0.00894880345*T^1-1.58366345E-5*T^2+7.97543259E-9*T^3}
      cs: Interpolation | table = {{273, 1403}, {278, 1427}, {283, 1447}, {293, 1481}, {303, 1507}, {313, 1526}, {323, 1541}, {333, 1552}, {343, 1555}, {353, 1555}, {363, 1550}, {373, 1543}}; interp = piecewisecubic
  mat2: Common "graphene" on domains 4
    def "Basic"
      relpermittivity = 50000

Physics
  es: Electrostatics on all domains
    dependent variable V
    EquationForm.form = Transient
    MeshControl.EnableMeshControl = 1
    ccn1: ChargeConservation (default)
    axi1: AxialSymmetry (default)
    zc1: ZeroCharge (default)
    init1: init "Initial Values 1" (default)
    sfcd1: SurfaceChargeDensity (disabled) on boundaries 7, 9, 17 | rhoqs = -0.25
    pot1: ElectricPotential on boundaries 8
    pot2: ElectricPotential on boundaries 2 | V0 = V_bot
  tds: DilutedSpecies "Transport of Diluted Species" on domains 1, 2
    dependent variable c_p = {c_p, c_n}
    ShapeProperty.order_concentration = 2
    TransportMechanism.Convection = 0
    TransportMechanism.Migration = 1
    MassConsistentStabilization.Residual = ApproximatedResidual
    MassInconsistentStabilization.massIsotropicDiffusion = 0
    cdm1: ConvectionDiffusionMigration "Transport Properties 1" (default) | z = {z_p, z_n}; D_c_p = D_K; D_c_n = D_Cl
    axi1: AxialSymmetry (default)
    nflx1: NoFlux (default)
    init1: init "Initial Values 1" (default) | initc = {c_top, c_top}
    open1: OpenBoundary (disabled) on boundaries 5 | c0 = {c_top, c_top}
    open2: OpenBoundary (disabled) on boundaries 2 | c0 = {c_bottom, c_bottom}
    init2: init "Initial Values 2" on domains 1-4 | initc = {c_bottom, c_bottom}
    in1: Inflow on boundaries 5 | c0 = {c_top, c_top}
    in2: Inflow on boundaries 2 | c0 = {c_bottom, c_bottom}

Multiphysics
  pc1: PotentialCoupling on all domains | PotentialSource_physics = es; PotentialDestination_physics = tds
  scdc1: SpaceChargeDensityCoupling on all domains
    SpaceChargeDensitySource_physics = tds
    SpaceChargeDensityDestination_physics = es

Mesh
  mesh1 "Mesh 1"
    size: MeshSizeDefault
      table = cfd
      hmax = R_p / N_div
      hmin = t_gr / N_div
      hnarrow = 5
      hgrad = 1.05
      hauto = 4
      custom = on
    ftri1: FreeTri "Free Triangular 1" on remaining entities
      size1: Size (disabled) on no boundaries | hmax = t_gr / N_div * 2; hmin = t_gr / N_div; hgrad = 1.3; custom = on
      dis1: Distribution on boundaries 6, 10 | numelem = N_bound * 40
      dis2: Distribution on boundaries 4 | numelem = N_bound
    bl1: BndLayer "Boundary Layers 1" (disabled) on domains 1, 2
      blp: BndLayerProp "Boundary Layer Properties" on boundaries 6, 10 | blnlayers = 30; blstretch = 1.02

Studies
  std1 "Study 1"
    param: Parametric "Parametric Sweep"
      sweeptype = filled
      pname = {N_div, N_bound}
      plistarr = {"1, 2, 5, 10", "20, 50, 100, 200"}
      punit = {, }
    stat: Stationary
    time: Transient "Time Dependent" (disabled) | tlist = range(0,0.01,0.1)

Solver configurations
  sol1 "Solution 1" (study std1)
    v1: Variables "Dependent Variables 1"
    s1: Stationary "Stationary Solver 1" | stol = 0.0005
      fc1: FullyCoupled | initstep = 0.01; minstep = 1.0E-6; maxiter = 50
      d1: Direct
  sol2 "Solution 1 - Copy 1" (study std1)

Datasets
  dset1: Solution | solution = sol1
  rev1: Revolve2D "Revolution 2D 1" | data = dset1
  cln1: CutLine2D | data = dset1; genpoints = {{0, -H}, {0, H}}
  cln2: CutLine2D | data = dset1; genpoints = {{0, 0}, {(R_p - t_helm) * 0.95, 0}}
  dset2: Solution | solution = sol2

Derived values
  int1: IntLine "Line Integration 1"
    data = cln2
    table = tbl1
    expr = tds.tflux_c_nz + tds.tflux_c_pz
    unit = mol/s
    intsurface = on
  av1: AvLine "Line Average 1"
    data = dset1
    table = tbl2
    expr = es.nD
    unit = C/m^2
    descr = Surface charge density
    intsurface = on
  gev1: EvalGlobal "Global Evaluation 1"
    data = dset1
    table = tbl3
    expr = numberofdofs
    unit = 1
    descr = Number of degrees of freedom

Tables
  tbl1: Table
    // Line Integration 1 (tds.tflux_c_nz + tds.tflux_c_pz)
    V_gate (V) | tds.tflux_c_nz + tds.tflux_c_pz (mol/s)
    0.125 | -5.43594e-17
    0.25 | -2.30697e-17
    0.375 | -4.88877e-18
    0.5 | 2.33439e-17
    0.625 | 7.46029e-17
    0.75 | 1.48241e-16
    0.875 | -1.68969e-17
    1 | -3.3036e-16
    1.125 | -4.5423e-16
    1.25 | -1.17167e-16
  tbl2: Table
    // Line Average 1 (es.nD)
    V_gate (V) | Surface charge density (C/m^2) | Surface charge density (C/m^2)
    -1.25 | 0 | -3.16547
    -0.972222 | 0 | -2.08722
    -0.694444 | 0 | -1.02682
    -0.416667 | 0 | -0.0102584
    -0.138889 | 0 | 0.482028
    0.138889 | 0 | 0.517948
    0.416667 | 0 | 1.00916
    0.694444 | 0 | 2.02544
    0.972222 | 0 | 3.08594
    1.25 | 0 | 4.1641
  tbl3: Table
    // Global Evaluation 1 (numberofdofs)
    V_gate (V) | Number of degrees of freedom (1)
    0.125 | 6.01512e+06
    0.25 | 6.01512e+06
    0.375 | 6.01512e+06
    0.5 | 6.01512e+06
    0.625 | 6.01512e+06
    0.75 | 6.01512e+06
    0.875 | 6.01512e+06
    1 | 6.01512e+06
    1.125 | 6.01512e+06
    1.25 | 6.01512e+06

Plots
  pg1: PlotGroup2D "Electric Potential (es)" | data = dset1
    surf1: Surface | expr = V
  pg6: PlotGroup2D "Total Flux z anion" | data = dset1
    surf1: Surface | expr = log10(abs(tds.tflux_c_nz))
  pg12: PlotGroup2D "Total Flux z cation" | data = dset1
    surf1: Surface | expr = tds.tflux_c_pz; unit = mol/(m^2*s); descr = Total flux, z component
  pg8: PlotGroup1D "1D Plot Group 8" | data = cln2
    lngr1: LineGraph | expr = V - V_bot; xdata = expr; xdataexpr = r
  pg9: PlotGroup1D "Total flux z cation r" | data = cln2
    lngr1: LineGraph
      expr = tds.tflux_c_pz
      unit = mol/(m^2*s)
      descr = Total flux, z component
      xdata = expr
      xdataexpr = r
  pg13: PlotGroup1D "Total flux z anion r" | data = cln2
    lngr1: LineGraph
      expr = tds.tflux_c_nz
      unit = mol/(m^2*s)
      descr = Total flux, z component
      xdata = expr
      xdataexpr = r